fs := 1000
Ts := 1/fs
Time := 0.6
N := Time/Ts
N = 600
n := 0 .. N - 1
S_In[n] := 0.05
S_In[n] := if(n < 120, S_In[n], if(mod(n, 10) > 5, 2, S_In[n]))
S_In[n] := if(n < 240, S_In[n], 1.6)
S_In[n] := if(n < 360, S_In[n], if(mod(n, 8) > 1, 0, 0.8))
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b := 1/16
p := 1 .. N - 1
S_Out[0] := 0
S_Out[p] := S_Out[p - 1] + (b*(S_In[p - 1] - S_Out[p - 1]))
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