v := L*di/dt  # disabled
# For a constant input voltage applied for time Tn:
Vin := L*Δi/Tn  # disabled
Δi := Ipeak - Imin  # disabled  # for 100% core reset Imin = 0
Vin*Tn := L*Ipeak  # disabled
# From the Inductor design equations:
Bs*n*Ae > L*Ipeak  # disabled
# or
Bs*n*Ae > Vin*Tn  # disabled
# For an EP13 core:
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# Vin is 24 Volts.
# Vout = 24 Volts
# max duty cycle occurs at Vin min and Vout Max - assume max duty cycle at 50%
# Transformer Design
Freq := 200 kHz
Vin := 24*V
Ae1 := 19.5*mm^2
n1 := 40
Vout := 24*V
BsMax := 0.3*T
Vin/n1 = 0.6 V
n2 := 40
Al := 1.5*μH
Vin*n2/n1 = 24 V
δ := Vout/Vin*n1/n2
δ = 1
Al*n1^2 = 2.4 mH
δ := 0.3
Td := δ/Freq
Td = 1.5e-6 s
Vin*Td/(Ae1*n1) = 0.0461538 T
Imag_peak := Vin/(Al*n1^2)*Td
Imag_peak = 0.015 A
# [reference: AWG Wire.xmcd]
Wire := 30
DIAM(Wire) = 0.2546 mm
(DIAM(Wire)/2)^2*π*n1 = 2.03642 mm^2  # Winding Area = 13.5mm^2
TurnLen := 24 mm
TurnLen*n1 = 0.96 m
PriLen := n1*TurnLen
SecLen := n2*TurnLen
T := 60
SRES(Wire, T, Freq) = 0.394005 Ω/m
PriRes := SRES(Wire, T, Freq)*PriLen/1
PriRes = 0.378244 Ω
PriRes*(0.2 amp)^2 = 0.0151298 W
SecRes := SRES(Wire, T, Freq)*SecLen/1
SecRes = 0.378244 Ω
SecRes*(0.2 amp)^2 = 0.0151298 W
